# Определение кинематических передаточных фнкций за цикл работы мехнизма
# Исходные данные
l_OA := 0.067  # м
I_1S := 0.015  # кг*м^2
l_BC := 0.13  # м
I_2S := 0.0072  # кг*м^2
l_AB := 0.209  # м
I_3S := 0.012  # кг*м^2
φ_0 := 146.297*deg  # рад
G_1 := 50  # H
x_C := 0.1  # м
G_2 := 21  # H
y_C := 0  # м
G_3 := 38  # H
ω_q1 := 1
g = 9.80665 m/s^2
φ := 0, 1*deg .. 90*deg
p_I := 185*10^5  # Па
f := 0
p_II := 130*10^5  # Па
l_OD := 0.5*l_OA = 0.0335  # м
γ_max := 30*deg  # рад
m_1 := G_1/9.81 = 5.09684
d := 0.034  # м
M_c3max := 1400  # Н*м
m_2 := G_2/9.81 = 2.14067
φ_1max := 90*deg  # рад
Решение
m_3 := G_3/9.81 = 3.8736
# 1) Первичный механизм
I_В(0, 1)
φ_1(φ) := φ_0 + ω_q1*φ
φ_1(f)/deg = 146.297
x_A(φ) := l_OA*cos(φ_1(φ))
x_A(f) = -0.055739
x_D(φ) := 0.5*x_A(φ)
y_A(φ) := l_OA*sin(φ_1(φ))
y_A(f) = 0.0371775
y_D(φ) := 0.5*y_A(φ)
# 2) Группа
II_ВВВ(2, 3)
# Начальные приближения:
φ_3 := 80*deg
φ_2 := 20*deg
Given
x_A(φ) + l_AB*cos(φ_2) == x_C + l_BC*cos(φ_3)
y_A(φ) + l_AB*sin(φ_2) == y_C + l_BC*sin(φ_3)
[φ_2(φ); φ_3(φ)] := Find(φ_2, φ_3)
φ_3(f)/deg = 74.9988
φ_2(f)/deg = 25.0197
x_B(φ) := x_A(φ) + l_AB*cos(φ_2(φ))
y_B(φ) := y_A(φ) + l_AB*sin(φ_2(φ))
x_S2(φ) := x_A(φ) + 0.5*l_AB*cos(φ_2(φ))
y_S2(φ) := y_A(φ) + 0.5*l_AB*sin(φ_2(φ))
x_S3(φ) := x_C + 0.5*l_BC*cos(φ_3(φ))
y_S3(φ) := 0.5*l_BC*sin(φ_3(φ))
# Интерполяция (для ускорения вычислений)
N := 90
i := 0 .. N
Δφ := π/(2*N)
A_φ[i] := Δφ*i
A_φ2[i] := φ_2(A_φ[i])
cφ_2 := cspline(A_φ, A_φ2)
A_φ3[i] := φ_3(A_φ[i])
cφ_3 := cspline(A_φ, A_φ3)
φ_2(φ) := interp(cφ_2, A_φ, A_φ2, φ)
φ_3(φ) := interp(cφ_3, A_φ, A_φ3, φ)
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# План механизма и траектория точек
X := transpose([0, x_A(f), x_S2(f), x_B(f), x_C])
Y := transpose([0, y_A(f), y_S2(f), y_B(f), y_C])
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ω_q2(φ) := d/dφ(φ_2(φ))
ω_q3(φ) := d/dφ(φ_3(φ))
ω_q2(f) = 0.396505
ω_q3(f) = 0.575182
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V_qS2x(φ) := d/dφ(x_S2(φ))
V_qS2x(f) = -0.0547015
V_qS2y(φ) := d/dφ(y_S2(φ))
V_qS2y(f) = -0.0181923
V_qS2(φ) := sqrt(V_qS2x(φ)^2 + V_qS2y(φ)^2)
V_qDx(φ) := d/dφ(x_D(φ))
V_qDy(φ) := d/dφ(y_D(φ))
V_qD(φ) := sqrt(V_qDx(φ)^2 + V_qDy(φ)^2)
V_qS3x(φ) := d/dφ(x_S3(φ))
V_qS3y(φ) := d/dφ(y_S3(φ))
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ε_q2(φ) := d^2/dφ^2(φ_2(φ))
ε_q3(φ) := d^2/dφ^2(φ_3(φ))
ε_q2(f) = -0.0024174
ε_q3(f) = -0.297115
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a_qS2x(φ) := d^2/dφ^2(x_S2(φ))
a_qS2x(f) = 0.0409607
a_qS2y(φ) := d^2/dφ^2(y_S2(φ))
a_qS2y(f) = -0.0443598
a_qS3x(φ) := d^2/dφ^2(x_S3(φ))
a_qS3y(φ) := d^2/dφ^2(y_S3(φ))
a_qDx(φ) := d^2/dφ^2(x_D(φ))
a_qDy(φ) := d^2/dφ^2(y_D(φ))
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# Приведение масс
# Определим приведенные моменты инерции
I_PRI := I_1S*ω_q1^2
I_PRI = 0.015
I_PRJ2(φ) := I_2S*ω_q2(φ)^2
I_PRJ2(f) = 0.00113196
I_PRm2(φ) := m_2*(V_qS2x(φ)^2 + V_qS2y(φ)^2)
I_PRm2(f) = 0.00711391
I_PRJ3(φ) := I_3S*ω_q3(φ)^2
I_PRJ3(f) = 0.00397001
I_PRII(φ) := I_PRJ2(φ) + I_PRm2(φ) + I_PRJ3(φ)
I_PRII(f) = 0.0122159
I_ΣPR(φ) := I_PRI + I_PRII(φ)
I_ΣPR(f) = 0.0272159
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# Определим производные приведенных моментов инерции
dI_PRJ2(φ) := 2*I_2S*ω_q2(φ)*ε_q2(φ)
dI_PRJ2(f) = -1.38026e-5
dI_PRm2(φ) := 2*m_2*(V_qS2x(φ)*a_qS2x(φ) + V_qS2y(φ)*a_qS2y(φ))
dI_PRm2(f) = -0.00613776
dI_PRJ3(φ) := 2*I_3S*ω_q3(φ)*ε_q3(φ)
dI_PRJ3(f) = -0.00410149
dI_ΣPR(φ) := dI_PRJ2(φ) + dI_PRm2(φ) + dI_PRJ3(φ)
dI_ΣPR(f) = -0.010253
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# Приведение сил
γ(φ) := φ_3(φ) - φ_3(0)
M_c3(φ) := -γ(φ)*M_c3max/γ_max
M_PRC3(φ) := M_c3(φ)*ω_q3(φ)
A_c3 := integral(M_PRC3(φ), φ = 0 .. φ_1max) = -363.284
A_c31 := -0.5*γ_max*M_c3max = -366.519
F_I := p_I*π*d^2/4 = 16796.5
A_I := F_I*l_OD*φ_1max/3 = 294.62
F_II := p_II*π*d^2/4 = 11803
A_II := F_II*l_OD*φ_1max/3 = 207.031
A_III := |A_c3| - A_I - A_II = -138.367
F_III := 3*A_III/(φ_1max*l_OD) = -7888.43
p_III := |F_III|*4/(π*d^2) = 8688459
p(φ) :=
    p_I if (φ ≥ 0)*(φ ≤ φ_1max/3)
    p_II if (φ > φ_1max/3)*(φ ≤ 2*φ_1max/3)
    p_III if (φ > 2*φ_1max/3)*(φ ≤ φ_1max)
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F(φ) :=
    F_I if (φ ≥ 0)*(φ ≤ φ_1max/3)
    F_II if (φ > φ_1max/3)*(φ ≤ 2*φ_1max/3)
    F_III if (φ > 2*φ_1max/3)*(φ ≤ φ_1max)
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M_PRG2(φ) := -G_2*V_qS2y(φ)
M_PRG2(f) = 0.382039
M_PRF(φ) := F(φ)*V_qD(φ)
M_PRF(f) = 562.684
M_ΣPR(φ) := M_PRG2(φ) + M_PRC3(φ) + M_PRF(φ)
M_ΣPR(f) = 563.066
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A_Σ(φ) := integral(M_ΣPR(φ), φ = 0 .. φ)
A_AΣ[i] := A_Σ(A_φ[i])
cA_Σ := cspline(A_φ, A_AΣ)
A_Σ(φ) := interp(cA_Σ, A_φ, A_AΣ, φ)
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ω_1(φ) := sqrt(2*A_Σ(φ)/I_ΣPR(φ))
A_ω1[i] := ω_1(A_φ[i])
cω_1 := cspline(A_φ, A_ω1)
ω_1(φ) := interp(cω_1, A_φ, A_ω1, φ)
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ε_1(φ) := M_ΣPR(φ)/I_ΣPR(φ) - ω_1(φ)^2/(2*I_ΣPR(φ))*dI_ΣPR(φ)
A_ε1[i] := ε_1(A_φ[i])
cε_1 := cspline(A_φ, A_ε1)
ε_1(φ) := interp(cε_1, A_φ, A_ε1, φ)
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A_IΣPR[i] := I_ΣPR(A_φ[i])
cI_ΣPR := cspline(A_φ, A_IΣPR)
I_ΣPR(φ) := interp(cI_ΣPR, A_φ, A_IΣPR, φ)
t(φ) := integral(sqrt(I_ΣPR(φ)/(2*A_Σ(φ))), φ = 0.001 .. φ)
A_t[i] := t(A_φ[i])
ct := cspline(A_φ, A_t)
t(φ) := interp(ct, A_φ, A_t, φ)
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# Силовой расчет
f := π/4
ε_2(φ) := ε_q2(φ)*ω_1(φ)^2 + ω_q2(φ)*ε_1(φ)
ε_2(f) = 2491.39
ε_3(φ) := ε_q3(φ)*ω_1(φ)^2 + ω_q3(φ)*ε_1(φ)
ε_3(f) = -4583.39
a_S1x(φ) := a_qDx(φ)*ω_1(φ)^2 + V_qDx(φ)*ε_1(φ)
a_S1x(f) = 757.627
a_S1y(φ) := a_qDy(φ)*ω_1(φ)^2 + V_qDy(φ)*ε_1(φ)
a_S1y(f) = -74.7868
a_S2x(φ) := a_qS2x(φ)*ω_1(φ)^2 + V_qS2x(φ)*ε_1(φ)
a_S2x(f) = 1070.23
a_S2y(φ) := a_qS2y(φ)*ω_1(φ)^2 + V_qS2y(φ)*ε_1(φ)
a_S2y(f) = -208.43
a_S3x(φ) := a_qS3x(φ)*ω_1(φ)^2 + V_qS3x(φ)*ε_1(φ)
a_S3x(f) = 312.607
a_S3y(φ) := a_qS3y(φ)*ω_1(φ)^2 + V_qS3y(φ)*ε_1(φ)
a_S3y(f) = -133.644
M_Φ1(φ) := -I_1S*ε_1(φ)
M_Φ1(f) = -99.2924
M_Φ2(φ) := -I_2S*ε_2(φ)
M_Φ2(f) = -17.938
M_Φ3(φ) := -I_3S*ε_3(φ)
M_Φ3(f) = 55.0006
Φ_1x(φ) := -m_1*a_S1x(φ)
Φ_1x(f) = -3861.51
Φ_1y(φ) := -m_1*a_S1y(φ)
Φ_1y(f) = 381.177
Φ_2x(φ) := -m_2*a_S2x(φ)
Φ_2x(f) = -2291.02
Φ_2y(φ) := -m_2*a_S2y(φ)
Φ_2y(f) = 446.181
Φ_3x(φ) := -m_3*a_S3x(φ)
Φ_3x(f) = -1210.91
Φ_3y(φ) := -m_3*a_S3y(φ)
Φ_3y(f) = 517.681
A11 := [1, 1, 0, 0; 0, -1, 1, 0; 0, 0, -1, 1]
A12[2, 3] := 0
A12 = [0, 0, 0, 0; 0, 0, 0, 0; 0, 0, 0, 0]
A13[2, 0] := 0
A13 = [0; 0; 0]
A1 := augment(A11, A12, A13)
A1 = [1, 1, 0, 0, 0, 0, 0, 0, 0; 0, -1, 1, 0, 0, 0, 0, 0, 0; 0, 0, -1, 1, 0, 0, 0, 0, 0]
A2 := augment(A12, A11, A13)
A2 = [0, 0, 0, 0, 1, 1, 0, 0, 0; 0, 0, 0, 0, 0, -1, 1, 0, 0; 0, 0, 0, 0, 0, 0, -1, 1, 0]
Y(f) := [0, y_A(f), y_B(f), y_C]
YY(f) := stack(Y(f), Y(f), Y(f))
YY(f) = [0, -0.013125, 0.129368, 0; 0, -0.013125, 0.129368, 0; 0, -0.013125, 0.129368, 0]
A31(f) := vectorize(-A11*YY(f))
A31(f) = [0, 0.013125, 0, 0; 0, -0.013125, -0.129368, 0; 0, 0, 0.129368, 0]
X(f) := [0, x_A(f), x_B(f), x_C]
XX(f) := stack(X(f), X(f), X(f))
XX(f) = [0, -0.0657019, 0.0871931, 0.1; 0, -0.0657019, 0.0871931, 0.1; 0, -0.0657019, 0.0871931, 0.1]
A32(f) := vectorize(A11*XX(f))
A32(f) = [0, -0.0657019, 0, 0; 0, 0.0657019, 0.0871931, 0; 0, 0, -0.0871931, 0.1]
A33 := [1; 0; 0]
A3(f) := augment(A31(f), A32(f), A33)
A3(f) = [
    0, 0.013125, 0, 0, 0, -0.0657019, 0, 0, 1;
    0, -0.013125, -0.129368, 0, 0, 0.0657019, 0.0871931, 0, 0;
    0, 0, 0.129368, 0, 0, 0, -0.0871931, 0.1, 0
]
A(f) := stack(A1, A2, A3(f))
A(f) = [
    1, 1, 0, 0, 0, 0, 0, 0, 0;
    0, -1, 1, 0, 0, 0, 0, 0, 0;
    0, 0, -1, 1, 0, 0, 0, 0, 0;
    0, 0, 0, 0, 1, 1, 0, 0, 0;
    0, 0, 0, 0, 0, -1, 1, 0, 0;
    0, 0, 0, 0, 0, 0, -1, 1, 0;
    0, 0.013125, 0, 0, 0, -0.0657019, 0, 0, 1;
    0, -0.013125, -0.129368, 0, 0, 0.0657019, 0.0871931, 0, 0;
    0, 0, 0.129368, 0, 0, 0, -0.0871931, 0.1, 0
]
rows(A(f)) = 9
cols(A(f)) = 9
B1(f) := [-F(f)*cos(90*deg - φ_1(f)) - Φ_1x(f); -Φ_2x(f); -Φ_3x(f)]
B1(f) = [6173.64; 2291.02; 1210.91]
B2(f) := [G_1 - Φ_1y(f) + F(f)*sin(90*deg - φ_1(f)); G_2 - Φ_2y(f); G_3 - Φ_3y(f)]
B2(f) = [-11905.5; -425.181; -479.681]
B3(f) := [
    (G_1 + F(f)*sin(90*deg - φ_1(f)) - Φ_1y(f))*x_D(f) + (Φ_1x(f) + F(f)*cos(90*deg - φ_1(f)))*y_D(f) - M_Φ1(f);
    (G_2 - Φ_2y(f))*x_S2(f) + Φ_2x(f)*y_S2(f) - M_Φ2(f);
    (G_3 - Φ_3y(f))*x_S3(f) + Φ_3x(f)*y_S3(f) - M_Φ3(f) - M_c3(f)
]
B3(f) = [530.912; -119.788; 785.668]
B(f) := stack(B1(f), B2(f), B3(f))
B(f) = [6173.64; 2291.02; 1210.91; -11905.5; -425.181; -479.681; 530.912; -119.788; 785.668]
D(φ) := lsolve(A(φ), B(φ))
D(f) := lsolve(A(f), B(f))
F_10x(f) := D(f)[0]
F_10x(f) = 2459.64
F_12x(f) := D(f)[1]
F_12x(f) = 3714
F_23x(f) := D(f)[2]
F_23x(f) = 6005.02
F_30x(f) := D(f)[3]
F_30x(f) = 7215.93
F_10y(f) := D(f)[4]
F_10y(f) = -16764.3
F_12y(f) := D(f)[5]
F_12y(f) = 4858.8
F_23y(f) := D(f)[6]
F_23y(f) = 4433.62
F_30y(f) := D(f)[7]
F_30y(f) = 3953.94
M_1(f) := D(f)[8]
M_1(f) = 801.398
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F_10(φ) := sqrt(F_10x(φ)^2 + F_10y(φ)^2)
F_10(f) = 16943.7
φ10(φ) := angle(F_10x(φ), F_10y(φ))
φ10(f)/deg = 278.347
x11[0] := 0
y11[0] := 0
x11[1] := φ10(f)
y11[1] := F_10(f)
A_F10[i] := F_10(A_φ[i])
cF_10 := cspline(A_φ, A_F10)
F_10(φ) := interp(cF_10, A_φ, A_F10, φ)
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F_12(φ) := sqrt(F_12x(φ)^2 + F_12y(φ)^2)
F_12(f) = 6115.7
φ12(φ) := angle(F_12x(φ), F_12y(φ))
φ12(f)/deg = 52.6062
x11[0] := 0
y11[0] := 0
x11[1] := φ12(f)
y11[1] := F_12(f)
A_F12[i] := F_12(A_φ[i])
cF_12 := cspline(A_φ, A_F12)
F_12(φ) := interp(cF_12, A_φ, A_F12, φ)
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F_23(φ) := sqrt(F_23x(φ)^2 + F_23y(φ)^2)
F_23(f) = 7464.4
φ23(φ) := angle(F_23x(φ), F_23y(φ))
φ23(f)/deg = 36.4392
x11[0] := 0
y11[0] := 0
x11[1] := φ23(f)
y11[1] := F_23(f)
A_F23[i] := F_23(A_φ[i])
cF_23 := cspline(A_φ, A_F23)
F_23(φ) := interp(cF_23, A_φ, A_F23, φ)
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F_30(φ) := sqrt(F_30x(φ)^2 + F_30y(φ)^2)
F_30(f) = 8228.2
φ30(φ) := angle(F_30x(φ), F_30y(φ))
φ30(f)/deg = 28.7203
x11[0] := 0
y11[0] := 0
x11[1] := φ30(f)
y11[1] := F_30(f)
A_F30[i] := F_30(A_φ[i])
cF_30 := cspline(A_φ, A_F30)
F_30(φ) := interp(cF_30, A_φ, A_F30, φ)
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# Силовой расчет с учетом сил трения
f_тр := 0.1
D := 18*10^-3
# Радиусы кругов трения:
ρ_т := D*f_тр/2
ρ_т = 0.0009
# Моменты трения в шарнирах:
M_t10(φ) := F_10(φ)*ρ_т
M_t10(f) = 15.2494
M_t12(φ) := F_12(φ)*ρ_т
M_t12(f) = 5.50413
M_t23(φ) := F_23(φ)*ρ_т
M_t23(f) = 6.71796
M_t30(φ) := F_30(φ)*ρ_т
M_t30(f) = 7.40538
B3(φ) := [
    (G_1 + F(f)*sin(90*deg - φ_1(f)) - Φ_1y(f))*x_D(f) + (Φ_1x(f) + F(f)*cos(90*deg - φ_1(f)))*y_D(f) + 0 - M_Φ1(f) - M_t12(φ) + M_t10(φ);
    (G_2 - Φ_2y(f))*x_S2(f) + (Φ_2x(f)*y_S2(f) - M_Φ2(f) + M_t23(φ)) + M_t12(φ);
    (G_3 - Φ_3y(f))*x_S3(f) + Φ_3x(f)*y_S3(f) - M_Φ3(f) - M_c3(f) + M_t30(φ) + M_t23(φ)
]
B3(f) = [540.657; -107.566; 799.791]
B(f) := stack(B1(f), B2(f), B3(f))
B(f) = [6173.64; 2291.02; 1210.91; -11905.5; -425.181; -479.681; 540.657; -107.566; 799.791]
D(φ) := lsolve(A(φ), B(φ))
D(f) := lsolve(A(f), B(f))
F_10x(f) := D(f)[0]
F_10x(f) = 2366.94
F_12x(f) := D(f)[1]
F_12x(f) = 3806.71
F_23x(f) := D(f)[2]
F_23x(f) = 6097.73
F_30x(f) := D(f)[3]
F_30x(f) = 7308.64
F_10y(f) := D(f)[4]
F_10y(f) = -16930.6
F_12y(f) := D(f)[5]
F_12y(f) = 5025.14
F_23y(f) := D(f)[6]
F_23y(f) = 4599.96
F_30y(f) := D(f)[7]
F_30y(f) = 4120.27
M_1(f) := D(f)[8]
M_1(f) = 820.856
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F_10(φ) := sqrt(F_10x(φ)^2 + F_10y(φ)^2)
F_10(f) = 17095.2
φ10(φ) := angle(F_10x(φ), F_10y(φ))
φ10(f)/deg = 277.959
x11[0] := 0
y11[0] := 0
x11[1] := φ10(f)
y11[1] := F_10(f)
A_F10[i] := F_10(A_φ[i])
cF_10 := cspline(A_φ, A_F10)
F_10(φ) := interp(cF_10, A_φ, A_F10, φ)
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F_12(φ) := sqrt(F_12x(φ)^2 + F_12y(φ)^2)
F_12(f) = 6304.21
φ12(φ) := angle(F_12x(φ), F_12y(φ))
φ12(f)/deg = 52.8549
x11[0] := 0
y11[0] := 0
x11[1] := φ12(f)
y11[1] := F_12(f)
A_F12[i] := F_12(A_φ[i])
cF_12 := cspline(A_φ, A_F12)
F_12(φ) := interp(cF_12, A_φ, A_F12, φ)
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F_23(φ) := sqrt(F_23x(φ)^2 + F_23y(φ)^2)
F_23(f) = 7638.18
φ23(φ) := angle(F_23x(φ), F_23y(φ))
φ23(f)/deg = 37.0299
x11[0] := 0
y11[0] := 0
x11[1] := φ23(f)
y11[1] := F_23(f)
A_F23[i] := F_23(A_φ[i])
cF_23 := cspline(A_φ, A_F23)
F_23(φ) := interp(cF_23, A_φ, A_F23, φ)
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F_30(φ) := sqrt(F_30x(φ)^2 + F_30y(φ)^2)
F_30(f) = 8390.05
φ30(φ) := angle(F_30x(φ), F_30y(φ))
φ30(f)/deg = 29.4123
x11[0] := 0
y11[0] := 0
x11[1] := φ30(f)
y11[1] := F_30(f)
A_F30[i] := F_30(A_φ[i])
cF_30 := cspline(A_φ, A_F30)
F_30(φ) := interp(cF_30, A_φ, A_F30, φ)
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