# Синтез механизма по трем заданным положениям
# Исходные данные:
γ_1 := 75*deg  # рад
# Угловые координаты ведомого коромысла 3:
γ_2 := 90*deg  # рад
γ_3 := 105*deg  # рад
# Углы поворота ведущего коромысла 1
# по отношению к его начальному положению:
φ_12 := 30*deg  # рад
φ_13 := 90*deg  # рад
# Длина стойки:
l_4 := 0.1  # м
# Длина ведомого коромысла:
l_3 := 0.13  # м
# Решение:
# Обозначим через β угловые координаты 2-го звена
# Начальные значения параметров:
φ_1 := 0
l_1 := l_3
l_2 := l_3
β_1 := 0
β_2 := 0
β_3 := 0
# Выполним процедуру Given-Find:
Given
l_1*cos(φ_1) + l_2*cos(β_1) == l_4 + l_3*cos(γ_1)
l_1*sin(φ_1) + l_2*sin(β_1) == l_3*sin(γ_1)
l_1*cos(φ_1 + φ_12) + l_2*cos(β_2) == l_4 + l_3*cos(γ_2)
l_1*sin(φ_1 + φ_12) + l_2*sin(β_2) == l_3*sin(γ_2)
l_1*cos(φ_1 + φ_13) + l_2*cos(β_3) == l_4 + l_3*cos(γ_3)
l_1*sin(φ_1 + φ_13) + l_2*sin(β_3) == l_3*sin(γ_3)
F := Find(l_1, l_2, φ_1, β_1, β_2, β_3)
l_1 := F[0]
l_1 = 0.0674427
l_2 := F[1]
l_2 = 0.209228
φ_1 := F[2]
φ_1/deg = 146.297
β_1 := F[3]
β_1/deg = 24.9165
β_2 := F[4]
β_2/deg = 36.9066
β_3 := F[5]
β_3/deg = 60.2644
# Построим схему механизма в заданных положениях:
X1 := [0; l_1*cos(φ_1); l_4 + l_3*cos(γ_1); l_4]
Y1 := [0; l_1*sin(φ_1); l_3*sin(γ_1); 0]
X2 := [0; l_1*cos(φ_1 + φ_12); l_4 + l_3*cos(γ_2); l_4]
Y2 := [0; l_1*sin(φ_1 + φ_12); l_3*sin(γ_2); 0]
X3 := [0; l_1*cos(φ_1 + φ_13); l_4 + l_3*cos(γ_3); l_4]
Y3 := [0; l_1*sin(φ_1 + φ_13); l_3*sin(γ_3); 0]
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