# Проектирование кулачкового механизма с роликовым поступательно движущимся толкателем
# Закон движения толкателя
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# 1. Исходные данные
# Ход толкателя
h := 0.025  # м
# Допустимый угол давления
θ_m := 29*deg  # рад
# Рабочий угол
f_r := 150*deg  # рад
# Угол удаления
f_u := f_r/2  # рад
# Угол сближения
f_c := f_r/2  # рад
# Внеосность толкателя
e := 0  # м
# 2. Кинематические диаграммы
# Рассчитаем  угол дальнего выстоя
f_d := f_r - f_u - f_c
f_d/deg = 0
# Рассчитаем углы в характерных точках
f_0 := 0
f_0/deg = 0
f_1 := f_u/2
f_1/deg = 37.5
f_2 := f_u
f_2/deg = 75
f_3 := f_u + f_c/2
f_3/deg = 112.5
f_4 := f_r
f_4/deg = 150
# Принимаем максимальные значения аналогов ускорения толкателя в фазах удаления и сближения равным единицы
am_1 := 1
am_2 := 1
# Эти значения уточняются после построения диаграммы перемещений. Проведем интерполяцию графика аналога ускорений кусочно-линейной функцией
fa1 := [0; .0001; f_1; f_1 + .0001; f_2; f_2 + .0001; f_3; f_3 + .0001; f_4; f_4 + .0001; 2*π]
aa1 := [0; 3/4*am_1; am_1; -3/4*am_1; -am_1; -am_2; -3/4*am_2; am_2; 3/4*am_2; 0; 0]
a_q(f) := linterp(fa1, aa1, f)
f := 0, .0001 .. 2*π
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# Построим график аналога скорстей
v_q(f) := integral(a_q(f), f = 0 .. f)
f := 0, .01 .. 2*π
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# Проведем инетрполяцию графика аналога скоростей кусочно линейной функцией
Vv1 := [0; v_q(f_1); 0; v_q(f_3); 0; 0]
Ff1 := [0; f_1; f_2; f_3; f_4; 2*π]
v_q(f) := linterp(Ff1, Vv1, f)
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# Построим диаграмму перемещений
s(f) := integral(v_q(f), f = 0 .. f)
f := 0, .01 .. 2*π
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# Рассчитаем  максимальные значения аналогов ускорения в фазах удаления  сближения и пересчитаем все кинематические пары
am_1 := am_1*h/s(f_u)
am_1 = 0.0666997
am_2 := am_2*h/(s(f_u) - s(f_r))
am_2 = 0.066702
aa1 := [0; 3/4*am_1; am_1; -3/4*am_1; -am_1; -am_2; -3/4*am_2; am_2; 3/4*am_2; 0; 0]
fa1 := [0; .0001; f_1; f_1 + .0001; f_2; f_2 + .0001; f_3; f_3 + .0001; f_4; f_4 + .0001; 2*π]
a_q(f) := linterp(fa1, aa1, f)
f := 0, .0001 .. 2*π
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v_q(f) := integral(a_q(f), f = 0 .. f)
f := 0, .01 .. 2*π
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Vv1 := [0; v_q(f_1); 0; v_q(f_3); 0; 0]
Ff1 := [0; f_1; f_2; f_3; f_4; 2*π]
v_q(f) := linterp(Ff1, Vv1, f)
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s(f) := integral(v_q(f), f = 0 .. f)
f := 0, .01 .. 2*π
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# 3. Расчет минимального радиуса кулачка
# Первое приближение для неизвестных
s0 := h
e := 0
Given
tan(θ_m) == (v_q(f_1) + e)/(s0 + s(f_1))
tan(θ_m) == (-v_q(f_3) - e)/(s0 + s(f_3))
FF := Find(s0)
s0 := FF
s0 = 0.0564098
r0 := sqrt(s0^2 + e^2)
r0 = 0.0564098
# Построим фазовый портрет.. Уравнения касательных к фазавому портрету имеют вид
x1(y) := -e - tan(θ_m)*(y + s0)
x2(y) := -e + tan(θ_m)*(y + s0)
# Диапозон изменения аргумента в уравнениях касательных
y := -s0, -s0 + .001 .. h
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# Построим график угла давления
tgθ(f) := (v_q(f) + e)/(s0 + s(f))
θ(f) := atan(tgθ(f))
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# Построение профиля кулачка
x_A(f) := e*cos(f)
y_A(f) := e*sin(f)
# Уравнение окружности минимального радиуса
x_B(f) := x_A(f) + s0*cos(f + π/2)
y_B(f) := y_A(f) + s0*sin(f + π/2)
# Уравнения центрового профиля, полученные методом инверсии
x_C(f) := x_B(f) + s(f)*cos(f + π/2)
y_C(f) := y_B(f) + s(f)*sin(f + π/2)
# Построение конструктивного профиля кулачка
# Радиус ролика
r_R := 0.3*r0
r_R = 0.0169229
# Уравнения конструктивного профиля, полученные методом инверсии, имеют вид
x_D(f) := x_C(f) - r_R*cos(f + π/2 - θ(f))
y_D(f) := y_C(f) - r_R*sin(f + π/2 - θ(f))
# Угол изображения ролика и толкателя
f := 0*deg
# Уравнения окружности, изображающей ролик, имеют вид
xr(ϕ) := x_C(f) + r_R*cos(ϕ)
yr(ϕ) := y_C(f) + r_R*sin(ϕ)
# Уравнения прямой, изображающей толкатель, имеют вид
X := [x_C(f); x_C(f) - h*sin(f)]
Y := [y_C(f); y_C(f) + h*cos(f)]
ϕ := 0, π/24 .. 2*π
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